V_cc := 5 V
R_2 := 2 kΩ
R_3 := 330 Ω
R_4 := 620 Ω
R_5 := 2 kΩ
R_6 := 3.3 kΩ
R_tot := R_2 + R_3 + R_4 + R_5 + R_6 = 8250 Ω
SW_1 := V_cc
SW_2 := V_cc*R_3/(R_2 + R_3) = 0.708155 V
SW_3 := V_cc*(R_3 + R_2)/(R_2 + R_3 + R_4) = 3.94915 V
SW_4 := V_cc*(R_3 + R_2 + R_5)/(R_2 + R_3 + R_4 + R_5) = 4.37374 V
255/(5 V) = 1/V^2*□  # error: Missing term or expression.
SW_5 := V_cc*(R_3 + R_2 + R_5 + R_6)/(R_2 + R_3 + R_4 + R_5 + R_6) = 4.62424 V
NOSW := V_cc*(R_3 + R_4 + R_5 + R_6)/(R_2 + R_3 + R_4 + R_5 + R_6) = 3.78788 V
Procent*2^8
SW_1 - SW_5 = 0.375758 V
A_val2 := (0.4 V*2^8)/V_cc = 20.48
A_val3 := (SW_3*2^8)/V_cc = 202.197
A_val4 := (SW_4*2^8)/V_cc = 223.935
A_val5 := (SW_5*2^8)/V_cc = 236.761
2^8 - A_val3 = 53.8034
