CPU_f := 16*10^6
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SCL_f := 400*10^3
TWBRe := 16
4^64 = 3.40282e38
4^1 = 4
SCL_f == CPU_f/(16 + 2*TWBR*(4^TWPS)) solve, TWBR → 12/4^TWPS =  # error: This variable is undefined. Check that the label is set correctly.
TWPS := 1
173 - 100 = 73
SCL_f == CPU_f/(16 + 2*TWBR*(4^TWPS)) solve, TWBR → 3 = 3
174 - 111.1 = 62.9
183 - 125 = 58
CPU_f/(16 + 2*TWBR*4^TWPS) → 16000000/(8*TWBR + 16) =  # error
195 - 153.8 = 41.2
222 - 200 = 22
TWPS := 4
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SCL_f == CPU_f/(16 + 2*TWBR*4^TWPS) solve, TWBR, factor → 3*2^-6 = 0.046875
CPU_f/(16 + 2*TWBR*4^TWPS) → 16000000/(512*TWBR + 16) =  # error
TWPS := 16
SCL_f == CPU_f/(16 + 2*TWBR*4^TWPS) solve, TWBR → 3/1073741824 = 2.79397e-9
TWPS := 64
SCL_f == CPU_f/(16 + 2*TWBR*4^TWPS) solve, TWBR → 3/85070591730234615865843651857942052864
